*Heading
** Job name: Box2D_circle_35_M208 Model name: Box2D_homog
** Generated by: Abaqus/CAE 6.11-1
*Preprint, echo=NO, model=NO, history=NO, contact=NO
**
** PARTS
**
*Part, name=Box2D_circle_35
*Node
      1,  0.333799988,           0.,           0.
      2,          0.5,           0.,           0.
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*Element, type=S4R
 1,  17,  18, 109, 106
 2,  18,  19, 108, 109
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*Nset, nset=Matrix
   1,   2,   3,   4,   5,   7
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*Elset, elset=Matrix
   1,   2,   3,   4,   5,   6
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*Nset, nset=Inclusion
   1,   5,   6,   9,  10,  14
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*Elset, elset=Inclusion
  29,  30,  31,  32,  33,  34
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*Nset, nset=Setka_edges
   2,   3,   4,   7,   8,  11
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*Elset, elset=Setka_edges
   6,   8,  10,  12,  13,  14
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*GEOSTATIC Load Set 111 : Inclusion BSOURCE 0. 0. 0.3338 0.3338 0.
*End Part
**
**
** ASSEMBLY
**
*Assembly, name=Assembly
**
*Instance, name=Box2D_circle_35-1, part=Box2D_circle_35
*End Instance
**
*End Assembly
** ----------------------------------------------------------------
**
** STEP: Step-1
**
*Step, name=Step-1
*Static
1., 1., 1e-05, 1.
**
** OUTPUT REQUESTS
**
*Restart, write, frequency=0
**
** FIELD OUTPUT: F-Output-1
**
*Output, field, variable=PRESELECT
**
** HISTORY OUTPUT: H-Output-1
**
*Output, history, variable=PRESELECT
*End Step
